<neuroml xmlns="http://www.neuroml.org/schema/neuroml2"  xmlns:xi="http://www.w3.org/2001/XInclude" xmlns:xs="http://www.w3.org/2001/XMLSchema" xmlns:xsi="http://www.w3.org/2001/XMLSchema-instance" xsi:schemaLocation="http://www.w3.org/2001/XMLSchema" id="TestDoc">
    <network neuroLexId="Net" id="net0"  type="networkWithTemperature" temperature="32.0 degC">
        <population type="populationList" id="Pop_RB" component="Cell_RB" size="126">
            <instance id="0">
                <location y="0.000000" x="549.500000" z="0.000000"/>
            </instance>
            <instance id="1">
                <location y="0.000000" x="615.500000" z="0.000000"/>
            </instance>
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        </population>
        <population type="populationList" id="Pop_dlc" component="Cell_dlc" size="104">
            <instance id="0">
                <location y="137.000000" x="623.000000" z="102.927600"/>
            </instance>
            <instance id="1">
                <location y="137.000000" x="677.000000" z="121.230350"/>
            </instance>
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        </population>
        <population type="populationList" id="Pop_aIN" component="Cell_aIN" size="136">
            <instance id="0">
                <location y="86.074965" x="704.000000" z="32.261117"/>
            </instance>
            <instance id="1">
                <location y="91.180334" x="714.500000" z="27.265081"/>
            </instance>
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        </population>
        <population type="populationList" id="Pop_cIN" component="Cell_cIN" size="384">
            <instance id="0">
                <location y="82.592804" x="504.500000" z="30.974129"/>
            </instance>
            <instance id="1">
                <location y="76.340300" x="515.000000" z="40.592204"/>
            </instance>
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        </population>
        <population type="populationList" id="Pop_dIN" component="Cell_dIN" size="236">
            <instance id="0">
                <location y="112.814100" x="506.000000" z="57.048485"/>
            </instance>
            <instance id="1">
                <location y="61.412821" x="516.500000" z="39.919277"/>
            </instance>
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        </population>
        <population type="populationList" id="Pop_MN" component="Cell_MN" size="338">
            <instance id="0">
                <location y="72.385026" x="507.500000" z="48.504725"/>
            </instance>
            <instance id="1">
                <location y="61.594522" x="518.000000" z="33.084706"/>
            </instance>
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        </population>
        <population type="populationList" id="Pop_dla" component="Cell_dla" size="58">
            <instance id="0">
                <location y="137.000000" x="1110.500000" z="128.636300"/>
            </instance>
            <instance id="1">
                <location y="137.000000" x="1145.000000" z="127.250150"/>
            </instance>
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        </population>
    </network>
</neuroml>
